*HEADING
Reference benchmark cube, 20x20x20 nodes - fixed forever, unit ccx-static@ref20-v1
*NODE, NSET=NALL
1, 0.000000, 0.000000, 0.000000
2, 0.052632, 0.000000, 0.000000
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*ELEMENT, TYPE=C3D8, ELSET=EALL
1, 1, 2, 22, 21, 401, 402, 422, 421
2, 2, 3, 23, 22, 402, 403, 423, 422
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*NSET, NSET=FIX, GENERATE
1, 7981, 20
*MATERIAL, NAME=STEEL
*ELASTIC
210000., 0.3
*DENSITY
7.85E-9
*SOLID SECTION, ELSET=EALL, MATERIAL=STEEL
*BOUNDARY
FIX, 1, 3, 0.
*STEP
*STATIC
*CLOAD
20, 3, -1.
40, 3, -1.
60, 3, -1.
80, 3, -1.
100, 3, -1.
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8000, 3, -1.
*NODE FILE
U
*EL FILE
S
*END STEP
